A := [7, -5, 1; 4, 11, 2; 2, 3, 4]
A1 := [34, -5, 1; -36, 11, 2; -20, 3, 4]
detA1 := |A1| = 884
detA := |A| = 316
A2 := [7, 34, 1; 4, -36, 2; 2, -20, 4]
A3 := [7, -5, 34; 4, 11, -36; 2, 3, -20]
detA3 := |A3| = -1164
detA2 := |A2| = -1144
X1 := detA1/detA = 2.79747
X2 := detA2/detA = -3.62025
X3 := detA3/detA = -3.68354
A := [7, -5, 1; 4, 11, 2; 2, 3, 4]
B := [34; -36; -20]
X := A^-1*B
transpose(X) = [2.79747, -3.62025, -3.68354]
