1.
A := det([6, -6, 6; 4, 3, -4; 3, -7, -3])
A1 := det([20, -6, 6; 10, 3, -4; 20, -7, -3])
A2 := det([6, 20, 6; 4, 10, -4; 3, 20, -3])
A3 := det([6, -6, 20; 4, 3, 10; 3, -7, 20])
x1 := A1/A
x2 := A2/A
x3 := A3/A
x1 = 2.74775
x2 = -1.35135
x3 = -0.765766
A := [6, -6, 6; 4, 3, -4; 3, -7, -3]
B := [20; 10; 20]
x := A^-1*B
transpose(x) = [2.74775, -1.35135, -0.765766]
2.
U(t) :=
    (-15) if 0 < t < 0.2
    0 if t == 0.2
    (-75*t) if 0.2 < t < 0.4
    0 if t > 0.4
t := 0, 0.000001 .. 0.015
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