# Задание 1
Em(t) :=
    0.6 if 0 < t < 0.1
    0.6 if t == 0.1
    10.5 if 0.1 < t < 0.31
    6.43*t + 8.57 if 0.3 < t < 1
    0 if t == 1
    0 if t > 1
1.
J(t) :=
    (150*t) if 0 < t ≤ 0.1
    (-75*t + 22.5) if 0.1 < t < 0.3
    0 if t > 0.3
t := 0, 0.00001 .. 0.5
t := 0, 0.00001 .. 3
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2.
# Задание 2
A := 95
B := 40
C := 74
D := 13
T := 2*π/10^4
2*T = 0.00125664
# 1. | 2. | 3.
f3(t) := A*sin(10^4*t - 54*deg) + D*cos(10^2*t - 108*deg) - C*e^(-1164*t)
f2(t) := D*sin(10^4*t - 25*deg)*0.2*D*sin(2*10^4*t - 90*deg) - 0.02*D*sin(5*10^4*t - 45*deg)
f1(t) := A*sin(10^4*t - 54*deg) + B*e^(-4789*t) - C*e^(-11649*t)
t := 0, 0.000001 .. 0.015
t := 0, 0.000001 .. 0.015
t := 0, 0.000001 .. 0.015
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