j := sqrt(-1)
Z1 := 1 - 7j
Z2 := 5 + 6j
Z3 := 4 - 6j
Z4 := 3 + 4j
A := Z1*Z4*(Z2 + Z3) = 279 - 153j
B := Z1*Z4/(Z2 + Z3) = 3.44444 - 1.88889j
C := Z1*Z2/(Z1 - Z2) + Z3 + Z4 = 8.02162 + 1.92973j
D := Z1*Z4 = 31 - 17j
# 1.
A10 := det([A, C; B, D])
A11 := det([Z2, C; Z3, D])
A12 := det([A, Z2; B, Z3])
x1 := A11/A10 = -0.00044945 + 0.022795j
x2 := A12/A10 = 0.18085 - 0.0969328j
arg(x1)/deg = 91.1296
arg(x2)/deg = -28.1906
|x1| = 0.0227994
|x2| = 0.205189
x1 := 0.023*e^91.13j
x2 := 0.205*e^(-28.191j)
# 2.
A20 := [A, C; B, D]
B2 := [Z2; Z3]
x := A20^-1*B2 = [-0.00044945 + 0.022795j; 0.18085 - 0.0969328j]
arg(x)/deg = [91.1296; -28.1906]
|x| = 0.206452
