j := sqrt(-1)
Z1 := 1 - j*4
Z2 := 5 + 5*j
Z3 := 5 + j*7
Z4 := 6 + 7*j
# 1. | 2.
S12 := Z1 + Z2 = 6 + 1j
S34 := Z3 + Z4 = 11 + 14j
X3 := [0; Re(Z3)]
Y3 := [0; Im(Z3)]
X1 := [0; Re(Z1)]
y1 := [0; Im(Z1)]
d12 := Z1 - Z2 = -4 - 9j
d34 := Z3 - Z4 = -1
U12 := Z1*Z2 = 25 - 15j
U34 := Z3*Z4 = -19 + 77j
X2 := [0; Re(Z2)]
Y2 := [0; Im(Z2)]
X4 := [0; Re(Z4)]
Y4 := [0; Im(Z4)]
D12 := Z1/Z2 = -0.3 - 0.5j
D34 := Z3/Z4 = 0.929412 + 0.0823529j
X12 := [0; Re(S12)]
Y12 := [0; Im(S12)]
X34 := [0; Re(S34)]
Y34 := [0; Im(S34)]
arg(S12)/deg = 9.46232
arg(S34)/deg = 51.8428
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arg(d34)/deg = 180
arg(d12)/deg = -113.962
arg(U12)/deg = -30.9638
arg(U34)/deg = 103.861
arg(D12)/deg = -120.964
arg(D34)/deg = 5.06362
|S12| = 6.08276
|S34| = 17.8045
|d12| = 9.84886
|d34| = 1
|U12| = 29.1548
|U34| = 79.3095
|D12| = 0.583095
|D34| = 0.933053
# 3. | 5.
# 1)
T1 := Z1*Z2 + Z3*Z4 = 6 + 62j  # Система 1
# Система 2
# Система 3
# Система 4
# Система 5
# 1) | 1) | 1) | 1) | 1)
arg(T1)/deg = 84.4725
|T1| = 62.2896
ZA10 := det([Z1, Z2; Z2, Z3])
ZA30 := det([Z4, Z1; Z1, Z2])
ZA50 := det([Z4, Z3; Z3, Z1])
ZA20 := det([Z2, Z4; Z4, Z1])
ZA40 := det([Z3, Z2; Z2, Z4])
# 2)
T2 := Z1*Z2/(Z1 + Z2) + Z3 + Z4 = 14.6486 + 10.8919j
ZA11 := det([Z2, Z2; Z4, Z3])
ZA31 := det([Z2, Z1; Z3, Z2])
ZA51 := det([Z4, Z3; Z2, Z1])
ZA21 := det([Z2, Z4; Z3, Z1])
ZA41 := det([Z1, Z2; Z3, Z4])
arg(T2)/deg = 36.6324
|T2| = 18.2542
ZA12 := det([Z1, Z2; Z2, Z4])
ZA32 := det([Z4, Z2; Z1, Z3])
ZA22 := det([Z2, Z2; Z4, Z3])
ZA52 := det([Z4, Z4; Z3, Z2])
# 3)
T3 := Z1*Z4/(Z2 + Z3) + Z1*Z3 = 33.5574 - 15.3689j
x11 := ZA11/ZA10 = 0.029656 - 0.0948992j
ZA42 := det([Z3, Z1; Z2, Z3])
x31 := ZA31/ZA30 = 0.786333 + 0.559772j
x21 := ZA21/ZA20 = 0.958648 + 0.0764784j
x51 := ZA51/ZA50 = 0.846154 - 0.0583554j
arg(T3)/deg = -24.6072
|T3| = 36.9093
x32 := ZA32/ZA30 = 1.15601 + 0.761098j
x12 := ZA12/ZA10 = 1.05635 - 0.0136418j
x41 := ZA41/ZA40 = -2.67431 + 0.252294j
# 4)
x22 := ZA22/ZA20 = 0.0271232 - 0.060916j
x52 := ZA52/ZA50 = 0.169761 + 0.0477454j
T4 := (Z1*Z3 + Z4)/(Z1 + Z3 + Z4) - Z2 = -3.32787 - 6.89344j
# 2)
# 2)
x42 := ZA42/ZA40 = 2.95963 - 0.26789j
# 2)
ZA3 := [Z4, Z1; Z1, Z2]
ZB3 := [Z2; Z3]
# 2)
ZA2 := [Z2, Z4; Z4, Z1]
ZB2 := [Z2; Z3]
arg(T4)/deg = -115.769
|T4| = 7.65469
ZA1 := [Z1, Z2; Z2, Z3]
ZB1 := [Z2; Z4]
# 2)
# 5)
ZA4 := [Z3, Z2; Z2, Z4]
ZB4 := [Z1; Z3]
ZA5 := [Z4, Z3; Z3, Z1]
ZB5 := [Z4; Z2]
T5 := Z1/(Z2 + Z3) + Z4 + Z2*Z3 = -4.15574 + 66.7869j
x3 := ZA3^-1*ZB3 = [0.786333 + 0.559772j; 1.15601 + 0.761098j]
x2 := ZA2^-1*ZB2 = [0.958648 + 0.0764784j; 0.0271232 - 0.060916j]
x1 := ZA1^-1*ZB1 = [0.029656 - 0.0948992j; 1.05635 - 0.0136418j]
x4 := ZA4^-1*ZB4 = [-2.67431 + 0.252294j; 2.95963 - 0.26789j]
x5 := ZA5^-1*ZB5 = [0.846154 - 0.0583554j; 0.169761 + 0.0477454j]
arg(T5)/deg = 93.5606
|T5| = 66.9161
# 6)
T6 := Z1*Z2*Z3/(Z1 + Z3 + Z3) + Z4 = 21.9729 + 1.57014j
arg(T6)/deg = 4.08729
|T6| = 22.0289
# 7)
T7 := Z1*Z3/(Z1 + Z3) - Z4*Z2 = 8.53333 - 68.9333j
arg(T7)/deg = -82.9432
|T7| = 69.4595
