J(t) :=
    (33*t) if 0 < t < 0.3
    (-50*t + 25) if 0.3 ≤ t < 0.5
    0 if t ≥ 0.5
E(t) :=
    2 if 0 < t ≤ 0.3
    7 if 0.3 < t < 0.5
    (6*t + 4) if 0.5 < t ≤ 1
    0 if t > 1
t := 0, 0.001 .. 0.75
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t := 0, 0.001 .. 1.5
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A := 57
B := 68
C := 96
D := 67
f1(t) := A*sin(10^4*t - 54*deg) + B*e^(-4789*t) - C*e^(-11649*t)
t := 0, 0.00001 .. 0.002
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f2(t) := D*sin(10^4*t - 25 deg) + 0.2*D*sin(2*10^4*t - 90 deg) - 0.02*D*sin(5*10^4*t - 45 deg)
t := 0, 0.00001 .. 0.002
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f3(t) := A*sin(10^4*t - 54 deg) + D*cos(10^2*t - 108 deg) - C*e^(-1164*t)
t := 0, 0.00001 .. 0.005
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