j := sqrt(-1)
Z[1] := 4 - j*9
Z[2] := 5 - j*2
Z[3] := 2 + j*7
Z[4] := 3 - j*5
S12 := Z[1] + Z[2] = 9 - 11j
15*e^(j*(-53))
arg(S12)/deg = -50.7106
|S12| = 14.2127
R12 := Z[1] - Z[2] = -1 - 7j
6.083*e^(j*(-99))
arg(R12)/deg = -98.1301
|R12| = 7.07107
P12 := Z[1]*Z[2] = 2 - 53j
57.428*e^(j*(-97))
arg(P12)/deg = -87.8389
|P12| = 53.0377
C12 := Z[1]/Z[2] = 1.31034 - 1.27586j
1.689*e^(j*(-35))
arg(C12)/deg = -44.2361
|C12| = 1.82889
S34 := Z[3] + Z[4] = 5 + 2j
6.403*e^(j*39)
arg(S34)/deg = 21.8014
|S34| = 5.38516
R34 := Z[3] - Z[4] = -1 + 12j
10.05*e^(j*96)
arg(R34)/deg = 94.7636
|R34| = 12.0416
P34 := Z[3]*Z[4] = 41 + 11j
30.887*e^(j*29)
arg(P34)/deg = 15.0184
|P34| = 42.45
C34 := Z[3]/Z[4] = -0.852941 + 0.911765j
1.716*e^(j*119)
arg(C34)/deg = 133.091
|C34| = 1.24853
x3 := [0; Re(Z[3])]
y3 := [0; Im(Z[3])]
x1 := [0; Re(Z[1])]
y1 := [0; Im(Z[1])]
x2 := [0; Re(Z[2])]
y4 := [0; Im(Z[4])]
y2 := [0; Im(Z[2])]
x4 := [0; Re(Z[4])]
x12 := [0; Re(S12)]
y12 := [0; Im(S12)]
x34 := [0; Re(S34)]
y34 := [0; Im(S34)]
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A1 := Z[1]*Z[4] + Z[2]*Z[3] = -9 - 16j
18.868*e^(j*(-32))
arg(A1)/deg = -119.358
|A1| = 18.3576
A2 := Z[1]*Z[2]/(Z[1] + Z[2]) + Z[3] + Z[4] = 7.97525 - 0.252475j
7.876*e^(j*10)
arg(A2)/deg = -1.81323
|A2| = 7.97924
7.123*e^(j*(-126))
A3 := Z[1]*Z[4]/(Z[2] + Z[3]) + Z[1]*Z[3] = 64.7027 + 7.78378j
arg(A3)/deg = 6.85976
|A3| = 65.1692
A4 := (Z[1]*Z[3] + Z[4])/(Z[1] + Z[3] + Z[4]) - Z[2] = -0.146154 + 6.33077j
7.149*e^(j*82)
arg(A4)/deg = 91.3225
|A4| = 6.33246
A5 := Z[1]/(Z[2] + Z[3]) + Z[4] + Z[2]*Z[3] = 26.7703 + 24.8784j
41.975*e^(j*36)
arg(A5)/deg = 42.9022
|A5| = 36.5456
A6 := Z[1]*Z[2]*Z[3]/(Z[1] + Z[3] + Z[3]) + Z[4] = 31.5393 - 34.3371j
48.501*e^(j*(-54))
arg(A6)/deg = -47.4319
|A6| = 46.6236
A7 := Z[1]*Z[3]/(Z[1] + Z[3]) - Z[4]*Z[2] = 5.15 + 36.05j
29.345*e^(j*82)
|A7| = 36.416
arg(A7)/deg = 81.8699
M1 := [Z[1], Z[2]; Z[2], Z[3]]
detM1 := |M1|
B1 := [Z[2]; Z[4]]
M1x := [Z[2], Z[2]; Z[4], Z[3]]
M1y := [Z[1], Z[2]; Z[2], Z[4]]
X1 := M1^-1*B1 = [0.826471 + 0.744118j; -1.03235 + 0.0794118j]
detM1x := |M1x| = 19 + 62j
detM1y := |M1y| = -54 - 27j
x1 := detM1x/detM1 = 0.826471 + 0.744118j
y1 := detM1y/detM1 = -1.03235 + 0.0794118j
M2 := [Z[2], Z[4]; Z[4], Z[1]]
B2 := [Z[2]; Z[3]]
detM2 := |M2|
X2 := M2^-1*B2 = [0.902696 - 2.40211j; -1.27081 + 1.82063j]
M2x := [Z[2], Z[4]; Z[3], Z[1]]
M2y := [Z[2], Z[2]; Z[4], Z[3]]
detM2x := |M2x|
detM2y := |M2y|
x2 := detM2x/detM2 = 0.902696 - 2.40211j
y2 := detM2y/detM2 = -1.27081 + 1.82063j
M3 := [Z[4], Z[1]; Z[1], Z[2]]
B3 := [Z[2]; Z[3]]
detM3 := |M3|
X3 := M3^-1*B3 = [-0.718736 - 0.00759763j; 0.813554 + 0.437775j]
M3x := [Z[2], Z[1]; Z[3], Z[2]]
M3y := [Z[4], Z[2]; Z[1], Z[3]]
detM3x := |M3x|
detM3y := |M3y|
x3 := detM3x/detM3 = -0.718736 - 0.00759763j
y3 := detM3y/detM3 = 0.813554 + 0.437775j
M4 := [Z[3], Z[2]; Z[2], Z[4]]
B4 := [Z[1]; Z[3]]
detM4 := |M4|
X4 := M4^-1*B4 = [-2.61425 + 0.152094j; 1.1543 + 2.26084j]
M4x := [Z[1], Z[2]; Z[3], Z[4]]
M4y := [Z[3], Z[1]; Z[2], Z[3]]
detM4x := |M4x|
detM4y := |M4y|
x4 := detM4x/detM4 = -2.61425 + 0.152094j
y4 := detM4y/detM4 = 1.1543 + 2.26084j
M5 := [Z[4], Z[3]; Z[3], Z[1]]
B5 := [Z[4]; Z[2]]
detM5 := |M5|
M5y := [Z[4], Z[4]; Z[3], Z[2]]
X5 := M5^-1*B5 = [0.895476 - 0.903276j; 0.471139 - 0.555382j]
M5x := [Z[4], Z[3]; Z[2], Z[1]]
detM5x := |M5x|
detM5y := |M5y|
x5 := detM5x/detM5 = 0.895476 - 0.903276j
y5 := detM5y/detM5 = 0.471139 - 0.555382j
