[-6, 3, -3; 3, 0, 6; 12, -3, 0] + [1, 4, 7; 2, 5, -8; -3, 6, 9] = [-5, 7, 4; 5, 5, -2; 9, 3, 9]
[-5, 7, 4; 5, 5, -2; 9, 3, 9]^2 = [96, 12, 2; -18, 54, -8; 51, 105, 111]
A1 := [4, -3, 5; 3, -2, 8; 1, -7, -5]
|A1| = 100
